// COMSOL Multiphysics 5.3.1.348 model "Practica8_1.mph"
// Outline of the model tree

Parameters
  epsi_r = 5.6[1]  // permeabilidad relativa
  Ri = 0.25[m]  // radio interior
  Re = 0.55[m]  // radio exterior
  epsi_0 = 8.85e-12[F/m]  // constante dieletrica del vacio

Geometry
  geom1 "Geometry 1" (2D, length unit m)
    c1: Circle | r = Re
    c2: Circle | r = Ri
    dif1: Difference | input = c1; input2 = c2
    fin: Finalize "Form Union"

Physics
  es: Electrostatics on domains 1
    dependent variable V
    ccn1: ChargeConservation (default) | epsilonr_mat = userdef; epsilonr = epsi_r; materialType = solid
    zc1: ZeroCharge (default)
    init1: init "Initial Values 1" (default)
    scd1: SpaceChargeDensity "Densidad de carga espacial 1" on domains 1 | rhoq = 6[C/F/m^2]*epsi_r*epsi_0
    pot1: ElectricPotential "Potencial eléctrico 1" on boundaries 8 | V0 = -3[V/m ^2]*Re^2/2
    pot2: ElectricPotential "Potencial eléctrico 2" on boundaries 7 | V0 = -3[V/m ^2]*Ri^2/2
    sfcd1: SurfaceChargeDensity "Densidad de carga superficial 1" on boundaries 1-6
      rhoqs = -3[C/m^2/F]*epsi_r*epsi_0*(x*nx+y*ny)

Mesh
  mesh1 "Mesh 1" (physics-controlled)

Studies
  std1 "Study 1"
    stat: Stationary

Solver configurations
  sol1 "Solución 1" (study std1)
    v1: Variables "Variables dependientes 1"
    s1: Stationary "Resolvedor estacionario 1"
      dDef: Direct "Directo"
      fc1: FullyCoupled "Completamente acoplado 1" | linsolver = dDef

Datasets
  dset1: Solution | solution = sol1

Derived values
  max1: MaxSurface "Máximo de superficie 1" on all domains
    data = dset1
    table = tbl1
    expr = {V, abs(V+3*(x^2+y^2)/2)}
    unit = {V, }
    descr = {Potencial eléctrico, }
  int1: IntLine "Integración de líneas 1" on boundaries 8
    data = dset1
    table = tbl2
    expr = abs(es.normE-3*Re*pi*Re/2)
    descr = Campo eléctrico, norma

Tables
  tbl1: Table "Tabla 1"
    // Máximo de superficie 1 (V)
    Potencial eléctrico (V) | abs(V+3*(x^2+y^2)/2)
    -0.09375 | 0.000118002
  tbl2: Table "Tabla 2"
    // Integración de líneas 1 (es.normJ)
    Densidad de corriente, norma (A/m) | Campo eléctrico, norma (V) | Campo eléctrico, norma
    0 | 1.4239 | 0.192357

Plots
  pg1: PlotGroup2D "Potencial eléctrico (es)" | data = dset1
    surf1: Surface "Superficie 1" | expr = abs(es.EX-3*x)
  pg2: PlotGroup2D "Grafica Personalizada" | data = dset1
    str1: Streamline "Línea de Flujo 1" | expr = {es.JX, es.JY}; descr = Densidad de corriente