// COMSOL Multiphysics 5.6.0.401 model "p10ej1.mph"
// Outline of the model tree

Geometry
  geom1 "Geometría 1" (2D, length unit m)
    c1: Circle "Círculo 1"
    fin: Finalize "Formar unión"

Physics
  poeq: PoissonEquation "Ecuación de Poisson" on all domains
    dependent variable u
    peq1: PoissonEquation "Ecuación de Poisson 1" (default)
    zflx1: ZeroFluxBoundary "Flujo cero 1" (default)
    init1: init "Valores iniciales 1" (default)
    dir1: DirichletBoundary "Condición de contorno de Dirichlet 1" on all boundaries | r = 0

Mesh
  mesh1 "Malla normal" (physics-controlled)
  mesh2 "Malla más fina" (physics-controlled)
    size: MeshSizeDefault "Tamaño" | hauto = 3
  mesh3 "Malla extremadamente fina" (physics-controlled)
    size: MeshSizeDefault "Tamaño" | hauto = 1

Studies
  std1 "Estudio 1"
    stat: Stationary "Estacionario" | mesh = {geom1, mesh1}

Solver configurations
  sol1 "Solución 1" (study std1)
    v1: Variables "Variables dependientes 1"
    s1: Stationary "Resolvedor estacionario 1"
      dDef: Direct "Directo"
      fc1: FullyCoupled "Completamente acoplado 1" | linsolver = dDef

Datasets
  dset1: Solution | solution = sol1

Derived values
  max1: MaxSurface "Máximo del error de estimación" on domains 1
    data = dset1
    table = tbl1
    expr = {abs(u-(1-x^2-y^2)/4), 1, 4}
    descr = {Error de solución en L2, Error de gradiente en L2, Error de solución en H1}
  max2: MaxSurface "Máximo del error de estimación del gradiente" | data = dset1; expr = u

Tables
  tbl1: Table "Tabla 1"
    // Máximo del error de estimación
    Error de solución en L2 | Error de gradiente en L2 (1) | Error de solución en H1 (1)
    1.31367e-05 | 1 | 4

Plots
  pg1: PlotGroup2D "Grupo gráfico 2D 1" | data = dset1
    surf1: Surface "Solución" | data = dset1; expr = u
  pg2: PlotGroup2D "Grupo gráfico 2D 2" | data = dset1
    surf1: Surface "Error de la solución" | data = dset1; expr = abs(u+1/(2*pi)*log(sqrt(x^2+y^2)))